/*
  This is the main file to add the SimplePelvis model to the Thoracic model of AMMR4 Beta
*/


// for test-purposes - remove after switch for SimplePelvis has been completely integrated
Main = {
  #if BM_SIMPLEPELVIS == ON
    AnyFolder SIMPLEPELVISisON = {
    };

  #else
    AnyFolder SIMPLEPELVISisOFF = {
    };
  #endif
};


// SCALING
#include "SimplePelvisScaling.any"


// SEGMENTS AND NODES
#include "SimplePelvisSegments.any"


// JOINTS + FDK
#include "SimplePelvisJoints.any"


// MUSCLES
#include "SimplePelvisMuscles.any"


// LIGAMENTS
#include "SimplePelvisLigaments.any"


// DRIVERS
#include "SimplePelvisDrivers.any"


// ABDOMINAL PRESSURE
Main.HumanModel.BodyModel.Trunk = {
  AnyFolder AbdominalPressure = {
    // pressure is forces distributed over volume nodes
    // AnyForce3D IAP = {
    //   AnyRefFrame &PoA = Main.HumanModel.BodyModel.Trunk.Abdominal.Layer_L5.CavitySegPosterior.VolumePoints.Center;
    //   // change in pressure from rest to valsalva: approx. 18.3 kPa --> 18300 N/m^2 [Schünke, 2022]
    //   // pressure acts on pelvic outlet with diameter of 9 - 11 cm, assume to be circular with d = 10 cm
    //   // F_IAP = p * A - assume it points perfectly downwards
    //   // testcase2: cut pressure in half -> IAP = 70 N
    //   F = {0, -70.0, 0}*t;
    // };
  };
};


// STUDY
#include "SimplePelvisStudy.any"


// OUTPUT
#include "SimplePelvisOutput.any"


// DRAWING OPTIONS
Main.DrawSettings.KinematicVolume = {
  Opacity = 0.1;
};
